OpenVSP model (file version 5), 6 components.
Geometry view with OpenVSP parameter names; values to 6 digits, angles in degrees, lengths in the model's unit.
Overall bounding box: X_Min=0 X_Len=15.0694 Y_Min=-9.0272 Y_Len=18.0544 Z_Min=-0.87265 Z_Len=4.60155

TransportFuse "TransportFuse"
  location (X Y Z) 0 0 0, rotation 0 0 0
  bounding box size 14.5457 1.40087 1.44757
  Design: AftCenter=0.3 AftHeight=0.3 AftMult=3 AftWidth=0.1 Diameter=1.40087 Length=14.5457 NoseCenter=-0.2 NoseMult=1.5
  custom script TransportFuse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

Wing "WingGeom", child of "TransportFuse"
  location (X Y Z) 4.09836 0 0, rotation 3.03279 0 0
  symmetric about XZ
  bounding box size 6.30771 18.0544 1.31673
  totals: TotalSpan=18 TotalProjectedSpan=17.9998 TotalChord=2.11614 TotalArea=38.0906 TotalAR=8.50583 MAC=2.37006
  root: chord 3.38583, twist -2.04724, NACA 4-series Camber=0 CamberLoc=0.2 DeltaX=0.135714 DeltaY=-0.164286 Theta=-2.85714 ThickChord=0.1
  sections:
    n  Span  Root_Chord  Tip_Chord  Area     Sweep    Sweep_Location  Dihedral  Twist  Twist_Location  tip airfoil
    1  9     3.38583     0.846457   19.0453  33.4286  0               0.285714  0      0.25            NACA 4-series Camber=0 CamberLoc=0.2 ThickChord=0.1

Wing "WingGeom", child of "WingGeom"
  location (X Y Z) 5.16393 0 0, rotation -2.54098 0 -5.2459
  symmetric about XZ
  bounding box size 4.29718 8.17546 0.976246
  totals: TotalSpan=8.17608 TotalProjectedSpan=8.17608 TotalChord=2.5 TotalArea=20.4402 TotalAR=3.27043 MAC=2.79683
  root: chord 4, twist -10, NACA 4-series Camber=0 CamberLoc=0.2 DeltaX=-0.0642857 DeltaY=-0.0928571 ThickChord=0.1
  sections:
    n  Span     Root_Chord  Tip_Chord  Area     Sweep  Sweep_Location  Dihedral  Twist  Twist_Location  tip airfoil
    1  4.08804  4           1          10.2201  30     0               0         0      0.25            NACA 4-series Camber=0 CamberLoc=0.2 ThickChord=0.1

Wing "WingGeom", child of "TransportFuse"
  location (X Y Z) 11.8852 0 0.245902, rotation 8.36066 0 -1.72131
  symmetric about XZ
  bounding box size 2.99929 7.93081 0.892469
  totals: TotalSpan=8 TotalProjectedSpan=8 TotalChord=1.42717 TotalArea=11.4173 TotalAR=5.60552 MAC=1.5978
  root: chord 2.28346, twist 0, NACA 4-series Camber=0 CamberLoc=0.2 Theta=5.85714 ThickChord=0.1
  sections:
    n  Span  Root_Chord  Tip_Chord  Area     Sweep  Sweep_Location  Dihedral  Twist  Twist_Location  tip airfoil
    1  4     2.28346     0.570866   5.70866  30     0               0         0      0.25            NACA 4-series Camber=0 CamberLoc=0.2 ThickChord=0.1

Wing "WingGeom", child of "TransportFuse"
  location (X Y Z) 14.2623 0 3.68852, rotation 0 0 0
  symmetric about XZ
  bounding box size 4.03543 1e-06 3.43024
  totals: TotalSpan=1e-06 TotalProjectedSpan=1e-06 TotalChord=2.01772 TotalArea=2.01772e-06 TotalAR=4.9561e-07 MAC=2.25984
  root: chord 3.22835, twist 0, NACA 4-series Camber=0 CamberLoc=0.2 DeltaX=-1 DeltaY=-1 ThickChord=0.1
  sections:
    n  Span   Root_Chord  Tip_Chord  Area         Sweep  Sweep_Location  Dihedral  Twist  Twist_Location  tip airfoil
    1  5e-07  3.22835     0.807087   1.00886e-06  30     0               0         0      0.25            NACA 4-series Camber=0 CamberLoc=0.2 ThickChord=0.1

Box "Box", child of "TransportFuse"
  location (X Y Z) 4.23913 0 -0.606262, rotation 0 0 0; relative location 4.23913 0 -0.326087, rotation 0 0 0
  bounding box size 4.56888 1.31456 0.532777
  Design: Height=0.532777 Length=4.56888 SquareFlag=0 Width=1.31456
  custom script Box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
